*Heading
** Job name: liftboom-free-050623 Model name: Model-1
** Generated by: Abaqus/CAE 2020
*Preprint, echo=NO, model=NO, history=NO, contact=NO
**
** PARTS
**
*Part, name=P000524_A_1-Nostopuomi_v2_fem_st
*Node
      1,  0.591041446, 0.0138479015, 0.0799999982
      2,  0.589060783, 0.0319077261, 0.0799999982
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*Element, type=C3D10
  1,   48,  510,   41, 1242, 1952, 1951, 1950, 1954, 1953, 1955
  2, 1851,  506,  518,  519, 1958, 1957, 1956, 1960, 1959, 1961
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*Nset, nset=Set-8, generate
     1,  11495,      1
*Elset, elset=Set-8, generate
    1,  5690,     1
*Nset, nset=Set-9, generate
     1,  11495,      1
*Elset, elset=Set-9, generate
    1,  5690,     1
*Nset, nset=Set-10, generate
     1,  11495,      1
*Elset, elset=Set-10, generate
    1,  5690,     1
** Section: Section-1
*Solid Section, elset=Set-10, material=Material-1
,
*End Part
**
**
** ASSEMBLY
**
*Assembly, name=Assembly
**
*Instance, name=P000524_A_1-Nostopuomi_v2_fem_st-1, part=P000524_A_1-Nostopuomi_v2_fem_st
*End Instance
**
*End Assembly
**
** MATERIALS
**
*Material, name=Material-1
*Density
7850.,
*Elastic
 2.1e+11, 0.3
** ----------------------------------------------------------------
**
** STEP: Step-1
**
*Step, name=Step-1, nlgeom=NO, perturbation
*Frequency, eigensolver=Lanczos, sim, acoustic coupling=on, normalization=mass
10, , , , ,
**
** OUTPUT REQUESTS
**
*Restart, write, frequency=0
**
** FIELD OUTPUT: F-Output-1
**
*Output, field, variable=PRESELECT
*End Step
** ----------------------------------------------------------------
**
**
** STEP: Matrix gen
*Step, name=matrix-step
*Matrix generate, stiffness, mass
*Matrix output, stiffness, mass, format=coordinate
*End Step
