*Heading
** Job name: Job-1 Model name: Model-1
** Generated by: Abaqus/CAE 2020
*Preprint, echo=NO, model=NO, history=NO, contact=NO
**
** PARTS
**
*Part, name=TiltBoom
*Node
      1, -0.0689999983,  0.243199319, 0.0450110957
      2, -0.120999999,  0.243199319, 0.0510110967
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*Element, type=C3D4
   1,  243,  244, 2509, 2510
   2, 1421, 2510, 1914, 1422
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*Nset, nset=InitiallyInvalid
 39,
*Nset, nset=Set-1, generate
    1,  2617,     1
*Elset, elset=Set-1, generate
    1,  7410,     1
** Section: Section-1
*Solid Section, elset=Set-1, material=Composites
,
*End Part
**
**
** ASSEMBLY
**
*Assembly, name=Assembly
**
*Instance, name=TiltBoom-1, part=TiltBoom
*End Instance
**
*End Assembly
**
** MATERIALS
**
*Material, name=Composites
*Density
1530.,
*Elastic
 1.398e+11, 0.34
** ----------------------------------------------------------------
**
** STEP: Step-1
**
*Step, name=Step-1, nlgeom=NO, perturbation
*Frequency, eigensolver=Lanczos, sim, acoustic coupling=on, normalization=mass
10, , , , ,
**
** OUTPUT REQUESTS
**
*Restart, write, frequency=0
**
** FIELD OUTPUT: F-Output-1
**
*Output, field, variable=PRESELECT
*End Step
** ----------------------------------------------------------------
**
**
** STEP: Matrix gen
*Step, name=matrix-step
*Matrix generate, stiffness, mass
*Matrix output, stiffness, mass, format=coordinate
*End Step
